# ---------- Initialize Simulation ---------------------
clear
units           metal
dimension       3
processors      * * *
atom_style      atomic
boundary        p p p

# ---------- Create Atoms ---------------------
lattice 	fcc 4.05 #This changes results
region	box block 0 5 0 5 0 5 units lattice
create_box	1 box
create_atoms 1 box

mass 1 26.98

# ---------- Define Filename Prefix ---------------------
#variable file_prefix string "${element}_${lattype}_${latconst}_${minimiser_style}"

# ---------- Save Log File with Dynamic Name ---------------------
#log ${file_prefix}_log.lammps

# ---------- Save Initial Structure ---------------------
write_data Al_initial_structure.xyz

# ---------- Define Interatomic Potential ---------------------
# Default potential (EAM alloy)
#variable potential_file string "/Users/chandan21gupta/Desktop/iit_delhi/agent_llms_3/mat-agent-bench/modal_app/potentials/EAM/CuAgAuNiPdPtAlPbFeMoTaWMgCoTiZr_Zhou04.eam.alloy"
#variable pair_style_type string "eam/alloy"

#if "${element} == C" then "variable potential_file string /Users/chandan21gupta/Desktop/iit_delhi/agent_llms_3/mat-agent-bench/modal_app/potentials/TERSOFF/SiCGe.tersoff"
#if "${element} == C" then "variable pair_style_type string tersoff"

# Apply pair style
pair_style eam/alloy
pair_coeff * * /Users/chandan21gupta/Desktop/iit_delhi/agent_llms_5/mat-agent-bench/tasks/lammps/lammps/ground_truth/potentials/Al/eam/Al99.eam.alloy Al

neighbor 2.0 bin
neigh_modify delay 10 check yes

# ---------- Define Settings ---------------------
compute eng all pe/atom
compute eatoms all reduce sum c_eng

# ---------- Run Minimization ---------------------
reset_timestep 0
#fix 1 all box/relax iso 0.0 vmax 0.001
thermo 10
thermo_style custom step pe lx ly lz press pxx pyy pzz c_eatoms
min_style cg
minimize 1.0e-10 1.0e-10 100000 100000

# ---------- Save Final Structure ---------------------
write_data Al_minimised_structure.xyz

variable natoms equal "count(all)"
variable teng equal "c_eatoms"
variable length equal "lx"
variable ecoh equal "v_teng/v_natoms"

print "Total energy (eV) = ${teng};"
print "Number of atoms = ${natoms};"
#print "Lattice constant (Angstoms) = ${length};"
#print "Cohesive energy (eV) = ${ecoh};"
print "${ecoh}" file Al_cohesive_energy.txt

#print "All done!"
